# simulation of three bead model with network percolation and
# conformational change.


##########################################

# user input
variable Nsteps         equal 200000
variable Nwrite         equal   1000
variable equilTime      equal  20000
variable seed           equal 349503
variable tstep          equal  0.001
variable boxLength      equal     lx

##########################################

# configuration
units lj
boundary p p p
atom_style bond         # bead-spring polymer
read_data network.in extra/bond/per/atom 1 extra/special/per/atom 3

labelmap atom 1 stic 2 hinge

group stickers         type 1
group hinges           type 2

# three bead unfolding template loading
molecule folded intramoltemplate/folded_three_bead.data
molecule unfolded intramoltemplate/unfolded_three_bead.data

# intermolecular template loading

# loading sticker-sticker intermolecular templates
molecule pre_ssfu intermoltemplate/pre_sticstic_fu_inter.data
molecule post_ssfu intermoltemplate/post_sticstic_fu_inter.data
molecule pre_ssff intermoltemplate/post_sticstic_ff_inter.data
molecule post_ssff intermoltemplate/post_sticstic_ff_inter.data
molecule pre_ssuu intermoltemplate/pre_sticstic_uu_inter.data
molecule post_ssuu intermoltemplate/post_sticstic_uu_inter.data

# loading hinge-hinge intermolecular templates
molecule pre_hhfu intermoltemplate/pre_hingehinge_fu_inter.data
molecule post_hhfu intermoltemplate/post_hingehinge_fu_inter.data
molecule pre_hhff intermoltemplate/pre_hingehinge_ff_inter.data
molecule post_hhff intermoltemplate/post_hingehinge_ff_inter.data
molecule pre_hhuu intermoltemplate/pre_hingehinge_uu_inter.data
molecule post_hhuu intermoltemplate/post_hingehinge_uu_inter.data

# loading sticker-hinge intermolecular templates. one is for outer sticker, one is for inner sticker
molecule pre_ishfu intermoltemplate/pre_instic_hinge_fu_inter.data
molecule post_ishfu intermoltemplate/post_instic_hinge_fu_inter.data
molecule pre_ishff intermoltemplate/pre_instic_hinge_ff_inter.data
molecule post_ishff intermoltemplate/post_instic_hinge_ff_inter.data
molecule pre_ishuu intermoltemplate/pre_instic_hinge_uu_inter.data
molecule post_ishuu intermoltemplate/pre_instic_hinge_uu_inter.data

molecule pre_oshfu intermoltemplate/pre_outstic_hinge_fu_inter.data
molecule post_oshfu intermoltemplate/post_outstic_hinge_fu_inter.data
molecule pre_oshff intermoltemplate/pre_outstic_hinge_ff_inter.data
molecule post_oshff intermoltemplate/post_outstic_hinge_ff_inter.data
molecule pre_oshuu intermoltemplate/pre_outstic_hinge_uu_inter.data
molecule post_oshuu intermoltemplate/pre_outstic_hinge_uu_inter.data

##########################################
# bond potentials

bond_style harmonic
bond_coeff 1 5 2        # sticker-hinge   (intra)
bond_coeff 2 5 2        # sticker-sticker (intra)
bond_coeff 3 5 2        # sticker-sticker (inter)
bond_coeff 4 5 2        # sticker-hinge   (inter)
bond_coeff 5 5 2        # hinge-hinge     (inter)


##########################################

# add brownian dynamics

fix 1 all nve                             # NVE integrator
fix 2 all langevin   1 1 2.0 ${seed}  # langevin thermostat

##########################################

# count bonds per atom

compute shintra all nbond/atom bond/type 1
compute ssintra all nbond/atom bond/type 2
compute ssinter all nbond/atom bond/type 3
compute shinter all nbond/atom bond/type 4
compute hhinter all nbond/atom bond/type 5


# keep track of bonds across the system

compute totalbonds all count/type bond
variable shintra equal c_totalbonds[1]
variable ssintra equal c_totalbonds[2]
variable ssinter equal c_totalbonds[3]
variable shinter equal c_totalbonds[4]
variable hhinter equal c_totalbonds[5]


##########################################

# thermodynamic info

variable t equal step*${tstep}

thermo ${Nwrite}

dump 1 all custom ${Nwrite} ../output/dump.lammpstrj id x y z type mol c_ssintra c_ssinter c_shinter c_hhinter
dump_modify 1 sort id

##########################################

# equilibration

pair_style soft 2.5
pair_coeff * * 10

velocity all create 1 203933 rot yes dist gaussian
run ${equilTime}

##########################################

# pair interactions
# shifted lj to be repulsive wca

pair_style lj/cut 5.0
pair_modify shift yes

pair_coeff * * 2.5 1.0

##########################################

# variables for bell equation

compute bondhinge hinges bond/local engpot
compute bondstic stickers bond/local engpot
variable bhinge equal c_bondhinge
variable bstic equal c_bondstic
compute ke_atom all ke/atom
variable ke atom c_ke_atom

variable ebarrier equal 5 # energy barrier

##########################################

# bond react

# the only intramolecular reaction is the unfolding process
# the intermolecular reactions are all bond formations between each atom type
fix rxn all bond/react stabilization no reset_mol_ids no &
  react unfolding all 1 2.0 10.0 folded unfolded intramoltemplate/three_bead.map molecule intra &
  react ssfu all 1 2.0 3.0 pre_ssfu post_ssfu intermoltemplate/sticstic_inter.map molecule inter &
  react ssff all 1 2.0 3.0 pre_ssff post_ssff intermoltemplate/sticstic_inter.map molecule inter &
  react ssuu all 1 2.0 3.0 pre_ssuu post_ssuu intermoltemplate/sticstic_inter.map molecule inter &
  react hhfu all 1 2.0 3.0 pre_hhfu post_hhfu intermoltemplate/hingehinge_inter.map molecule inter &
  react hhff all 1 2.0 3.0 pre_hhff post_hhff intermoltemplate/hingehinge_inter.map molecule inter &
  react hhuu all 1 2.0 3.0 pre_hhuu post_hhuu intermoltemplate/hingehinge_inter.map molecule inter &
  react ishfu all 1 2.0 3.0 pre_ishfu post_ishfu intermoltemplate/instic_hinge_inter.map molecule inter &
  react ishff all 1 2.0 3.0 pre_ishff post_ishff intermoltemplate/instic_hinge_inter.map molecule inter &
  react ishuu all 1 2.0 3.0 pre_ishuu post_ishuu intermoltemplate/instic_hinge_inter.map molecule inter &
  react oshfu all 1 2.0 3.0 pre_oshfu post_oshfu intermoltemplate/outstic_hinge_inter.map molecule inter &
  react oshff all 1 2.0 3.0 pre_oshff post_oshff intermoltemplate/outstic_hinge_inter.map molecule inter &
  react oshuu all 1 2.0 3.0 pre_oshuu post_oshuu intermoltemplate/outstic_hinge_inter.map molecule inter


fix nbondsfile all print 1000 "${t} ${ssintra} ${ssinter} ${shinter} ${hhinter}" file ../output/nbonds.dat screen no

#########################################

compute bondedatomid1 all property/local batom1
compute bondedatomid2 all property/local batom2

dump bondedatoms all local ${Nwrite} ../output/bondedatoms.dat index c_bondedatomid1 c_bondedatomid2
##########################################

#print some system info for analysis

variable Npar equal count(all)

print """
boxLength = ${boxLength}
Npar = ${Npar}
Nsteps = ${Nsteps} + ${equilTime}
Nwrite = ${Nwrite}
equilTime = ${equilTime}
""" file ../analysis/systemData.py

##########################################

# simulate

# minimize 1.0e-4 1.0e-6 1000 10000

timestep ${tstep}
#reset_timestep 0
neigh_modify every 1 delay 2 check yes

run ${Nsteps}
